// SBML level 3 version 2

function f_Uptake_Metallothionein_limited(Uptake_Metallothionein, AUptake, Max_Metallothionein)
  piecewise(Uptake_Metallothionein*AUptake, Uptake_Metallothionein*AUptake < Max_Metallothionein, Max_Metallothionein);
end

function f_BW(Age)
  3.938425 + 0.7518199*Age*12 - 0.02023793*(Age*12)^2 + 0.0002921682*(Age*12)^3 - 2.06762e-6*(Age*12)^4 + 8.469e-9*(Age*12)^5 - 2.188427e-11*(Age*12)^6 + 3.699776e-14*(Age*12)^7 - 4.099077e-17*(Age*12)^8 + 2.874804e-20*(Age*12)^9 - 1.159732e-23*(Age*12)^10 + 2.052602e-27*(Age*12)^11;
end

function f_Metallothionein_Kidney(Age)
  piecewise(0.95, Age < 30, 0.95 - 0.95/3*(Age - 30)/50);
end

function f_Kidney_Urine(Age, Increase_Cd_Urine)
  piecewise(0.00014, Age < 30, 0.00014 + Increase_Cd_Urine*(Age - 30));
end

function f_VCreat(Age)
  piecewise(0.032 + 0.02098*Age + 0.009104*Age^2 - 0.000455*Age^3 + 7.578e-6*Age^4 - 4.232e-8*Age^5, Age < 70, 0.032 + 0.02098*70 + 0.009104*70^2 - 0.000455*70^3 + 7.578e-6*70^4 - 4.232e-8*70^5);
end

model PBK_Cd()
  // model units - substance: MicroGM, time: DAY, volume: L, extent: MicroGM

  // Compartments:
  compartment Liver = 1 L; Liver is "liver";
  compartment Kidney = 1 L; Kidney is "kidney";
  compartment Others = 1 L; Others is "Rest of the body";
  compartment Feces = 1 L; Feces is "feces";
  compartment Urine = 1 L; Urine is "urine";
  compartment Intestine = 1 L; Intestine is "intestine";
  compartment Gut = 1 L; Gut is "gut";
  compartment Lung = 1 L; Lung is "lung";
  compartment Uptake = 1 L; Uptake is "Total Uptake";
  compartment Plasma = 1 L; Plasma is "blood plasma";
  compartment RBC = 1 L; RBC is "red blood cells";
  compartment Metallothionein = 1 L; Metallothionein is "metallothionein";

  // Species:
  substanceOnly species AUptake in Uptake = 0; AUptake is "Total Uptake";
  substanceOnly species AGut in Gut = 0; AGut is "amount of chemical in gut";
  substanceOnly species ALiver in Liver = 0; ALiver is "amount of chemical in liver";
  substanceOnly species AKidney in Kidney = 0; AKidney is "amount of chemical in kidney";
  substanceOnly species ALung in Lung = 0; ALung is "Amount in lungs";
  substanceOnly species AUrine in Urine = 0; AUrine is "Amount in urine";
  substanceOnly species AFeces in Feces = 0; AFeces is "Amount in feces";
  substanceOnly species AIntestine in Intestine = 0; AIntestine is "Amount in intestine";
  substanceOnly species APlasma in Plasma = 0; APlasma is "amount of chemical in plasma";
  substanceOnly species ARBC in RBC = 0; ARBC is "Amount in red blood cells";
  substanceOnly species AMetallothionein in Metallothionein = 0; AMetallothionein is "Amount in metallothionein";
  substanceOnly species AOthers in Others = 0; AOthers is "Rest of the body";

  // Parameters:
  time_scale = 1 DAY; time_scale is "Time scale of exposure";
  DeltaBW = 1 UNITLESS; DeltaBW is "Variability on bodyweight";
  BW has KiloGM; BW is "body weight";
  Age has YR; Age is "age";
  Inhalation_intake = 0.05 PER_DAY; Inhalation_intake is "Transfer from lung to total intake";
  Lung_Gut = 0.005 PER_DAY; Lung_Gut is "Transfer from lung to gut";
  Gut_Intestine = 0.048 UNITLESS; Gut_Intestine is "Fraction absorbed in intestine";
  Intestine_uptake = 0.05 PER_DAY; Intestine_uptake is "Transfer from intestine to total uptake";
  Uptake_Metallothionein = 0.25 UNITLESS; Uptake_Metallothionein is "Transfer from total uptake to metallothionein";
  Max_Metallothionein = 1 MicroGM; Max_Metallothionein is "Maximal dose in metallothionein";
  Uptake_Metallothionein_limited has MicroGM; Uptake_Metallothionein_limited is "Limited transfer from total uptake to metallothionein";
  Plasma_Others = 0.44 PER_DAY; Plasma_Others is "Transfer from plasma to the rest of the body";
  Others_Plasma = 0.00014 UNITLESS; Others_Plasma is "Transfer from rest of the body to plasma";
  Plasma_Feces = 0.27 UNITLESS; Plasma_Feces is "Transfer from plasma to feces";
  Plasma_Liver = 0.25 PER_DAY; Plasma_Liver is "Transfer from plasma to liver";
  Liver_Plasma = 3e-5 UNITLESS; Liver_Plasma is "Transfer from liver to plasma";
  Liver_Metallothionein = 0.00016 PER_DAY; Liver_Metallothionein is "Transfer from liver to metallothionein";
  Liver_Feces = 5e-5 PER_DAY; Liver_Feces is "Transfer from liver to feces";
  RBC_Metallothionein = 0.012 PER_DAY; RBC_Metallothionein is "Transfer from reb blood cells to metallothionein";
  Metallothionein_Kidney has UNITLESS; Metallothionein_Kidney is "Transfer from metallothionein to kidney";
  Kidney_Plasma = 1e-5 PER_DAY; Kidney_Plasma is "Transfer from kidney to plasma";
  Kidney_Urine has PER_DAY; Kidney_Urine is "Transfer from kidney to urine";
  Increase_Cd_Urine = 1.1e-6 PER_DAY; Increase_Cd_Urine is "Temporal factor increasing Cd elimination in urine";
  Plasma_RBC = 0.04 UNITLESS; Plasma_RBC is "Transfer from plasma to red blood cells";
  VCreat has GM; VCreat is "Volume of creatinine in urine";
  Cd_Urine has MicroGM_PER_GM; Cd_Urine is "Concentration in urine expressed per gram creatinine";

  // Assignment rules:
  BW := f_BW(Age)*DeltaBW;
  Age := time/365;
  Uptake_Metallothionein_limited := f_Uptake_Metallothionein_limited(Uptake_Metallothionein, AUptake, Max_Metallothionein);
  Metallothionein_Kidney := f_Metallothionein_Kidney(Age);
  Kidney_Urine := f_Kidney_Urine(Age, Increase_Cd_Urine);
  VCreat := f_VCreat(Age);
  Cd_Urine := (AMetallothionein*(1 - Metallothionein_Kidney/time_scale) + AKidney*Kidney_Urine)/f_VCreat(Age);

  // Reactions:
  _J0: ALung -> AIntestine; ALung*Lung_Gut;
  _J1: AGut -> AIntestine; AGut*Gut_Intestine/time_scale;
  _J2: ALung -> AUptake; ALung*Inhalation_intake;
  _J3: AIntestine -> AUptake; AIntestine*Intestine_uptake;
  _J4: AUptake -> AMetallothionein; Uptake_Metallothionein_limited/time_scale;
  _J5: AUptake -> APlasma; (AUptake - Uptake_Metallothionein_limited)/time_scale;
  _J6: APlasma -> AOthers; APlasma*Plasma_Others;
  _J7: APlasma -> ARBC; APlasma*Plasma_RBC/time_scale;
  _J8: AOthers -> APlasma; AOthers*Others_Plasma/time_scale;
  _J9: APlasma -> AFeces; APlasma*Plasma_Feces/time_scale;
  _J10: APlasma -> ALiver; APlasma*Plasma_Liver;
  _J11: ALiver -> APlasma; ALiver*Liver_Plasma/time_scale;
  _J12: ALiver -> AMetallothionein; ALiver*Liver_Metallothionein;
  _J13: ALiver -> AFeces; ALiver*Liver_Feces;
  _J14: ARBC -> AMetallothionein; ARBC*RBC_Metallothionein;
  _J15: AMetallothionein -> AKidney; AMetallothionein*Metallothionein_Kidney/time_scale;
  _J16: AKidney -> APlasma; AKidney*Kidney_Plasma;
  _J17: AKidney -> AUrine; AKidney*Kidney_Urine;
  _J18: AMetallothionein -> AUrine; AMetallothionein*(1 - Metallothionein_Kidney/time_scale);

  // Unit definitions:
  unit MicroGM = 1e-6 gram;
  unit DAY = 86400 second;
  unit L = litre;
  unit KiloGM = 1000 gram;
  unit YR = 3.15576e7 second;
  unit UNITLESS = dimensionless;
  unit PER_DAY = 1 / (86400 second);
  unit GM = gram;
  unit MicroGM_PER_GM = 1e-6 gram / gram;
end
